# исходные данные
i := 9
x_a := 5
x_b := 10
x_c := 13
x_LW := 200
y_LW := 300  # левый верхний угол
y_a := 2
y_b := 12
y_c := 8
x_HW := 800
y_HW := 700  # правый нижний угол
Z_x := transpose([x_a, x_b, x_c])
Z_y := transpose([y_a, y_b, y_c])
x_L := min(Z_x)
y_H := max(Z_y)
x_L = 5
y_H = 12  # левый верхний угол в МСК
x_H := max(Z_x)
y_L := min(Z_y)
x_H = 13
y_L = 2  # правый нижний угол в МСК
Δx_W := x_HW - x_LW
Δx_W = 600  # ширина области отображения в ОСК
Δx := x_H - x_L
Δx = 8  # ширина области отображения в МСК
Δy_W := y_HW - y_LW
Δy_W = 400  # высота в ОСК
Δy := y_H - y_L
Δy = 10  # высота в МСК
k_x := Δx_W/Δx
k_x = 75  # коэффициент k_x
k_y := Δy_W/Δy
k_y = 40  # коэффициент k_y
T_SW := [k_x, 0, x_LW - k_x*x_L; 0, -k_y, y_HW - k_y*y_L; 0, 0, 1]  # матрица пересчёта
[x_aw; y_aw; i] := T_SW*[x_a; y_a; 1]
# вершина A
[x_aw; y_aw; i] = [200; 540; 1]
[x_bw; y_bw; i] := T_SW*[x_b; y_b; 1]
# вершина B
[x_bw; y_bw; i] = [575; 140; 1]
[x_cw; y_cw; i] := T_SW*[x_c; y_c; 1]
# вершина C
[x_cw; y_cw; i] = [800; 300; 1]
X := transpose([x_a, x_b, x_c, x_a])
Y := transpose([y_a, y_b, y_c, y_a])
X_W := transpose([x_aw, x_bw, x_cw, x_aw])
Y_W := -transpose([y_aw, y_bw, y_cw, y_aw])
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